// COMSOL Multiphysics 6.2.0.658 model "arena_QSCR.mph"
// Outline of the model tree

Parameters
  Q_d = 0.5
  Q_u = 0.15
  P_d = 0.25
  C_h = Q_d/20
  Q_offset = 0
  air = Q_d*4
  C = 4.4e-9/8
  IACS_param = 55
  Ref_copper = 5.8E7
  Scaled_cond = Ref_copper*IACS_param/100
  Q_h = 0.5
  P_h = 0.03
  C_hor = 592e-12*C_factor
  C_ver = 4e-9*C_factor
  C_factor = 1.1

Variables
  var1 "Variables 1"
    P_loss = int_dom(emw.Qh) + int_bnd(emw.Qsh)
    B_norm = emw.normB
    H_scaled = emw.normH / sqrt(abs(P_loss))

Selections
  sel1: Explicit "wall" on boundaries 6-9, 28
  sel4: Explicit "pole" on boundaries 12-16, 18, 20, 23-25
  sel2: Explicit "air" on boundaries 1-5, 29
  sel3: Explicit "capacitor" on boundaries 10, 11, 17, 19, 21, 22, 26, 27

Couplings
  intop1: Integration "int_dom" on domains 1 | opname = int_dom
  intop2: Integration "int_bnd" on all boundaries | opname = int_bnd

Geometry
  geom1 "Geometry 1" (3D, length unit m)
    blk2: Block | pos = {-Q_d/2, -Q_d/2, -Q_u}; size = {Q_d, Q_d, Q_h + Q_u}
    blk1: Block "air" | base = center; size = {air, air, air}
    blk3: Block | pos = {0, 0, -P_h/2}; base = center; size = {P_d, Q_d, P_h}
    blk4: Block | pos = {0, 0, -P_h/2}; type = surface; base = center; size = {P_d + 2 * C_h, Q_d, P_h + 2 * C_h}
    blk5: Block | pos = {0, 0, +C_h/2}; base = center; size = {P_d - C_h/2, Q_d, C_h}
    blk6: Block | pos = {0, 0, -P_h - C_h/2}; base = center; size = {P_d - C_h/2, Q_d, C_h}
    blk7: Block | pos = {P_d/2 + C_h/2, 0, -P_h/2}; base = center; size = {C_h, Q_d, P_h}
    blk8: Block | pos = {-P_d/2 - C_h/2, 0, -P_h/2}; base = center; size = {C_h, Q_d, P_h}
    del1: Delete "Delete Entities 1"
      input = blk4(1) boundaries 1, 2, 4, 5; blk2(1) boundaries 4; blk5(1) boundaries 2, 4, 5; blk8(1) boundaries 1, 2, 4; blk6(1) boundaries 1, 2, 5; blk7(1) boundaries 1, 4, 5
    uni1: Union | input = blk1, blk3, del1
    del2: Delete "Delete Entities 2" | input = uni1(1) boundaries 10, 12, 13, 15, 27, 29, 31, 32
    fin: Finalize "Form Union"

Materials
  mat1: Common "wall_IACS_custom" on selection sel1
    def "Basic"
      relpermeability = 1
      heatcapacity = 900[J/(kg*K)]
      thermalconductivity = 238[W/(m*K)]
      electricconductivity = Scaled_cond[S/m]
      relpermittivity = 1
      thermalexpansioncoefficient = 23e-6[1/K]
      density = 2700[kg/m^3]
    Enu "Young's modulus and Poisson's ratio"
      E = 70e9[Pa]
      nu = 0.33
    Murnaghan
      l = -2.5e11[Pa]
      m = -3.3e11[Pa]
      n = -3.5e11[Pa]
    Lame "Lamé parameters"
      lambLame = 5.1e10[Pa]
      muLame = 2.6e10[Pa]
  mat3: Common "pole_IACS_custom" on selection sel4
    // same settings as mat1
  mat2: Common "Air" on all domains
    def "Basic"
      thermalexpansioncoefficient = alpha_p(pA,T)
      molarmass = 0.02897[kg/mol]
      bulkviscosity = muB(T)
      relpermeability = 1
      relpermittivity = 1
      dynamicviscosity = eta(T)
      ratioofspecificheat = 1.4
      electricconductivity = 0[S/m]
      heatcapacity = Cp(T)
      density = rho(pA,T)
      thermalconductivity = k(T)
      soundspeed = cs(T)
      eta: Piecewise | arg = T; pieces = {200.0, 1600.0, -8.38278E-7+8.35717342E-8*T^1-7.69429583E-11*T^2+4.6437266E-14*T^3-1.06585607E-17*T^4}; argunit = K; fununit = Pa*s
      Cp: Piecewise | arg = T; pieces = {200.0, 1600.0, 1047.63657-0.372589265*T^1+9.45304214E-4*T^2-6.02409443E-7*T^3+1.2858961E-10*T^4}; argunit = K; fununit = J/(kg*K)
      rho: Analytic | expr = pA*0.02897/R_const[K*mol/J]/T; args = {pA, T}; fununit = kg/m^3; argunit = {Pa, K}
      k: Piecewise | arg = T; pieces = {200.0, 1600.0, -0.00227583562+1.15480022E-4*T^1-7.90252856E-8*T^2+4.11702505E-11*T^3-7.43864331E-15*T^4}; argunit = K; fununit = W/(m*K)
      cs: Analytic | expr = sqrt(1.4*R_const[K*mol/J]/0.02897*T); args = T; fununit = m/s; argunit = K
      an1: Analytic | funcname = alpha_p; expr = -1/rho(pA,T)*d(rho(pA,T),T); args = {pA, T}; fununit = 1/K; argunit = {Pa, K}
      an2: Analytic "Analytic 2a" | funcname = muB; expr = 0.6*eta(T); args = T; fununit = Pa*s; argunit = K
    RefractiveIndex
      n = 1
      ki = 0
    NonlinearModel
      BA = (def.gamma+1)/2
    idealGas
      Rs = R_const/Mn
      heatcapacity = Cp(T)
      ratioofspecificheat = 1.4
      molarmass = 0.02897
      Cp: Piecewise | arg = T; pieces = {200.0, 1600.0, 1047.63657-0.372589265*T^1+9.45304214E-4*T^2-6.02409443E-7*T^3+1.2858961E-10*T^4}; argunit = K; fununit = J/(kg*K)

Physics
  emw: ElectromagneticWaves "Electromagnetic Waves, Frequency Domain" on domains 1
    dependent variable E = {Ex, Ey, Ez}
    PortOptions.PortFormulation = ConstraintBased
    wee1: WaveEquationElectric (default) | epsilonInf_mat = from_mat
    pec1: PerfectElectricConductor (default)
    init1: init "Initial Values 1" (default)
    imp1: Impedance "Impedance Boundary Condition 1" on selection sel4
      epsilonInf_mat = from_mat
      minput_frequency = root.freq
    trans1: TransitionBoundaryCondition on selection sel1
      epsilonInf_mat = from_mat
      d = 0.0015
      minput_frequency = root.freq
      activateResonanceConstraint = 1
    sctr1: Scattering "Scattering Boundary Condition 1" on selection sel2
    lport1: LumpedPort (disabled) on boundaries 17 | hPort = C_h; wPort = (P_d +P_h)*2; ahPort = {0, 1, 0}
    lelement1: LumpedElement on boundaries 11 | Zelement = 1e-12; LumpedElementType = Capacitor; Celement = C_hor
    lelement2: LumpedElement on boundaries 21 | Zelement = 1e-12; LumpedElementType = Capacitor; Celement = C_ver
    lelement3: LumpedElement on boundaries 22 | Zelement = 1e-12; LumpedElementType = Capacitor; Celement = C_ver
    lelement4: LumpedElement on boundaries 27 | Zelement = C_hor; LumpedElementType = Capacitor; Celement = C_hor
    lelement5: LumpedElement on boundaries 19 | Zelement = 1e12; LumpedElementType = Capacitor; Celement = C_ver
    lelement6: LumpedElement on boundaries 26 | Zelement = 1e12; LumpedElementType = Capacitor; Celement = C_hor
    lelement7: LumpedElement on boundaries 17 | Zelement = 0; LumpedElementType = Capacitor; Celement = C_ver
    lelement8: LumpedElement on boundaries 10 | Zelement = 1e12; LumpedElementType = Capacitor; Celement = C_hor

Mesh
  mesh1 "Mesh 1"
    size: MeshSizeDefault | hmax = 0.2; hmin = 0.036; hcurve = 0.6; hnarrow = 0.5; hgrad = 1.5
    ftri1: FreeTri "Free Triangular 1" on selection sel3
      size1: Size on selection sel3 | hmax = C_h/3; custom = on
    ftri3: FreeTri "Free Triangular 3" on selection sel4
      size1: Size on entire geometry | hmax = Q_d/20; custom = on
    ftri2: FreeTri "Free Triangular 2" on selection sel1
      size1: Size on selection sel1 | hmax = Q_d/20; custom = on
    ftet1: FreeTet "Free Tetrahedral 1" on remaining entities
      size1: Size on entire geometry

Studies
  std1 "Study 1"
    eigv: Eigenvalue | neigs = 1; shift = -j*2*pi*7e6
  std2 "Study 2"
    freq: Frequency "Frequency Domain" | punit = MHz; plist = 6.78; preusesol = auto

Solver configurations
  sol1 "Solution 1" (study std2)
    v1: Variables "Dependent Variables 1"
    s1: Stationary "Stationary Solver 1" | stol = 0.01
      p1: Parametric | pname = freq; plistarr = 6.78; punit = MHz; pcontinuationmode = no
      fc1: FullyCoupled
      i1: Iterative "Suggested Iterative Solver (emw)" | itrestart = 300; prefuntype = right
        mg1: Multigrid | iter = 1
  sol2 "Solution 2" (study std1)
    v1: Variables "Dependent Variables 1"
    e1: Eigenvalue "Eigenvalue Solver 1" | neigs = 1; shift = -j*2*pi*7e6; eigref = -j*2*pi*7e6
      d1: Direct "Suggested Direct Solver (emw)" | linsolver = pardiso

Datasets
  dset6: Solution | solution = sol1
  dset7: Solution | solution = sol2; phase = 90
  cpl1: CutPlane | data = dset7

Derived values
  gev1: EvalGlobal "Global Evaluation 1"
    data = dset6
    table = tbl1
    expr = {emw.Zport_1, imag(emw.Zport_1)/real(emw.Zport_1), imag(emw.Zport_1)/(2*3.14*emw.freq), emw.intWm, emw.intWe}
    unit = {Ω, 1, H, J, J}
    descr = {Lumped port impedance, , , Total magnetic energy, Total electric energy}
  gev3: EvalGlobal "Eigenfrequencies (emw)"
    data = dset7
    table = tbl2
    expr = {emw.freq, emw.Qfactor, emw.intWe, emw.intWm}
    unit = {rad/s, 1, J, J}
    descr = {Frequency, Quality factor, Total electric energy, Total magnetic energy}

Tables
  tbl1: Table "Port results"
    // Global Evaluation 1
    freq (MHz) | Lumped port impedance (Ω) | imag(emw.Zport_1)/real(emw.Zport_1) (1) | imag(emw.Zport_1)/(2*3.14*emw.freq) (H) | Total magnetic energy (J) | Total electric energy (J)
    6.78 | 0.00295985+5.13314i | 1734.26 | 1.20557e-07 | 4.78164e-11 | 1.50443e-13
  tbl2: Table "Eigenfrequency results"
    // Eigenfrequencies (emw)
    Eigenvalue (rad/s) | Frequency (rad/s) | Quality factor (1) | Total electric energy (J) | Total magnetic energy (J)
    9288.99-4.19179e+07i | 6.67145e+06 | 2256.32 | 1.2399e-09 | 9.62178e-07

Plots
  pg9: PlotGroup3D "Magnetic field slice" | data = dset7
    mslc1: Multislice
      data = dset7
      expr = emw.normH/sqrt(0.035738)
      xnumber = 0
      ynumber = 0
      multiplanezmethod = coord
      zcoord = 0.15
      filt1: Filter | expr = !isScalingSystemDomain
  pg11: PlotGroup3D "Magnetic field" | data = dset7
    mslc1: Multislice | expr = emw.normH; xnumber = 0; multiplanezmethod = coord; zcoord = 0.001
      filt1: Filter | expr = !isScalingSystemDomain
    arwv1: ArrowVolume (disabled)
      expr = {emw.Hx, emw.Hy, emw.Hz}
      descr = Magnetic field
      arrowxmethod = coord
      xcoord = range(-0.24,0.04,0.24)
      ynumber = 1
      arrowzmethod = coord
      zcoord = range(-0.14,0.04,0.5)
      arrowlength = normalized

Exports
  data1: Data "Magnetic field export"
    data = dset7
    expr = emw.normH/sqrt(0.035738)
    unit = A/m
    filename = /Users/takuya/Git/minizero_misc/assets/COMSOL_export/qscr-hfield.csv
    location = grid
    gridx3 = range(-0.25,0.01,0.25)
    gridy3 = range(-0.25,0.01,0.25)
    gridz3 = range(0,0.01,0.5)
    separator = ,