// COMSOL Multiphysics 6.2.0.658 model "arena_QSCR_SAR.mph"
// Outline of the model tree

Parameters
  Q_d = 0.5
  Q_u = 0.15
  P_d = 0.25
  C_h = Q_d/20
  Q_offset = 0
  air = Q_d*4
  C = 4.4e-9/8
  IACS_param = 55
  Ref_copper = 5.8E7
  Scaled_cond = Ref_copper*IACS_param/100
  Q_h = 0.5
  P_h = 0.03
  C_hor = 592e-12*C_factor
  C_ver = 4e-9*C_factor
  C_factor = 1.1
  mouse_x = 0

Variables
  var1 "Variables 1"
    P_loss = int_dom(emw.Qh) + int_bnd(emw.Qsh)
    B_norm = emw.normB
    H_scaled = emw.normH / sqrt(abs(P_loss))

Selections
  sel1: Explicit "wall" on boundaries 6-9, 36
  sel4: Explicit "pole" on boundaries 12-16, 18, 20, 29-31
  sel2: Explicit "air" on boundaries 1-5, 37
  sel3: Explicit "capacitor" on boundaries 10, 11, 17, 19, 21, 22, 32, 33

Couplings
  intop1: Integration "int_dom" on domains 1 | opname = int_dom
  intop2: Integration "int_bnd" on all boundaries | opname = int_bnd

Geometry
  geom1 "Geometry 1" (3D, length unit m)
    blk2: Block | pos = {-Q_d/2, -Q_d/2, -Q_u}; size = {Q_d, Q_d, Q_h + Q_u}
    blk1: Block "air" | base = center; size = {air, air, air}
    blk3: Block | pos = {0, 0, -P_h/2}; base = center; size = {P_d, Q_d, P_h}
    blk4: Block | pos = {0, 0, -P_h/2}; type = surface; base = center; size = {P_d + 2 * C_h, Q_d, P_h + 2 * C_h}
    blk5: Block | pos = {0, 0, +C_h/2}; base = center; size = {P_d - C_h/2, Q_d, C_h}
    blk6: Block | pos = {0, 0, -P_h - C_h/2}; base = center; size = {P_d - C_h/2, Q_d, C_h}
    blk7: Block | pos = {P_d/2 + C_h/2, 0, -P_h/2}; base = center; size = {C_h, Q_d, P_h}
    blk8: Block | pos = {-P_d/2 - C_h/2, 0, -P_h/2}; base = center; size = {C_h, Q_d, P_h}
    del1: Delete "Delete Entities 1"
      input = blk4(1) boundaries 1, 2, 4, 5; blk2(1) boundaries 4; blk5(1) boundaries 2, 4, 5; blk8(1) boundaries 1, 2, 4; blk6(1) boundaries 1, 2, 5; blk7(1) boundaries 1, 4, 5
    uni1: Union | input = blk1, blk3, del1
    del2: Delete "Delete Entities 2" | input = uni1(1) boundaries 10, 12, 13, 15, 27, 29, 31, 32
    wp1: WorkPlane | quickz = -P_h/2; unite = on
      sq1: Square | pos = {P_d/2 + 0.005 + 0.025, Q_d*3/8 + 0.025}; base = center; size = 0.05
      sq2: Square | pos = {P_d/2 + 0.005 + 0.025, Q_d*3/8 + 0.025}; base = center; size = 0.04
      sq3: Square | pos = {P_d/2 + 0.005 + 0.0475, Q_d*3/8 + 0.025}; base = center; size = 0.005
      dif1: Difference | input = sq1; input2 = sq2, sq3
      sq4: Square | pos = {P_d/2 + 0.005 + 0.0475, Q_d*3/8 + 0.025}; base = center; size = 0.005
    cyl1: Cylinder | pos = {mouse_x, -0.03, 0.0125 + 0.005}; axistype = y; r = 0.0125; h = 0.06
    fin: Finalize "Form Union"

Materials
  mat1: Common "wall_IACS_custom" on selection sel1
    def "Basic"
      relpermeability = 1
      heatcapacity = 900[J/(kg*K)]
      thermalconductivity = 238[W/(m*K)]
      electricconductivity = Scaled_cond[S/m]
      relpermittivity = 1
      thermalexpansioncoefficient = 23e-6[1/K]
      density = 2700[kg/m^3]
    Enu "Young's modulus and Poisson's ratio"
      E = 70e9[Pa]
      nu = 0.33
    Murnaghan
      l = -2.5e11[Pa]
      m = -3.3e11[Pa]
      n = -3.5e11[Pa]
    Lame "Lamé parameters"
      lambLame = 5.1e10[Pa]
      muLame = 2.6e10[Pa]
  mat3: Common "pole_IACS_custom" on selection sel4
    // same settings as mat1
  mat2: Common "Air" on domains 1, 2
    def "Basic"
      thermalexpansioncoefficient = alpha_p(pA,T)
      molarmass = 0.02897[kg/mol]
      bulkviscosity = muB(T)
      relpermeability = 1
      relpermittivity = 1
      dynamicviscosity = eta(T)
      ratioofspecificheat = 1.4
      electricconductivity = 0[S/m]
      heatcapacity = Cp(T)
      density = rho(pA,T)
      thermalconductivity = k(T)
      soundspeed = cs(T)
      eta: Piecewise | arg = T; pieces = {200.0, 1600.0, -8.38278E-7+8.35717342E-8*T^1-7.69429583E-11*T^2+4.6437266E-14*T^3-1.06585607E-17*T^4}; argunit = K; fununit = Pa*s
      Cp: Piecewise | arg = T; pieces = {200.0, 1600.0, 1047.63657-0.372589265*T^1+9.45304214E-4*T^2-6.02409443E-7*T^3+1.2858961E-10*T^4}; argunit = K; fununit = J/(kg*K)
      rho: Analytic | expr = pA*0.02897/R_const[K*mol/J]/T; args = {pA, T}; fununit = kg/m^3; argunit = {Pa, K}
      k: Piecewise | arg = T; pieces = {200.0, 1600.0, -0.00227583562+1.15480022E-4*T^1-7.90252856E-8*T^2+4.11702505E-11*T^3-7.43864331E-15*T^4}; argunit = K; fununit = W/(m*K)
      cs: Analytic | expr = sqrt(1.4*R_const[K*mol/J]/0.02897*T); args = T; fununit = m/s; argunit = K
      an1: Analytic | funcname = alpha_p; expr = -1/rho(pA,T)*d(rho(pA,T),T); args = {pA, T}; fununit = 1/K; argunit = {Pa, K}
      an2: Analytic "Analytic 2a" | funcname = muB; expr = 0.6*eta(T); args = T; fununit = Pa*s; argunit = K
    RefractiveIndex
      n = 1
      ki = 0
    NonlinearModel
      BA = (def.gamma+1)/2
    idealGas
      Rs = R_const/Mn
      heatcapacity = Cp(T)
      ratioofspecificheat = 1.4
      molarmass = 0.02897
      Cp: Piecewise | arg = T; pieces = {200.0, 1600.0, 1047.63657-0.372589265*T^1+9.45304214E-4*T^2-6.02409443E-7*T^3+1.2858961E-10*T^4}; argunit = K; fununit = J/(kg*K)
  mat4: Common "Copper" on boundaries 34
    def "Basic"
      relpermeability = 1
      electricconductivity = 5.998e7[S/m]
      thermalexpansioncoefficient = 17e-6[1/K]
      heatcapacity = 385[J/(kg*K)]
      relpermittivity = 1
      density = 8960[kg/m^3]
      thermalconductivity = 400[W/(m*K)]
    Enu "Young's modulus and Poisson's ratio"
      E = 110[GPa]
      nu = 0.35
    linzRes "Linearized resistivity"
      rho0 = 1.72e-8[ohm*m]
      alpha = 0.0039[1/K]
      Tref = 298[K]
  mat5: Common "mustlemodel" on domains 3
    def "Basic"
      density = 1000
      relpermittivity = 159
      electricconductivity = 0.401
      relpermeability = 1

Physics
  emw: ElectromagneticWaves "Electromagnetic Waves, Frequency Domain" on domains 1, 3
    dependent variable E = {Ex, Ey, Ez}
    wee1: WaveEquationElectric (default)
    pec1: PerfectElectricConductor (default)
    init1: init "Initial Values 1" (default)
    imp1: Impedance "Impedance Boundary Condition 1" on selection sel4
    trans1: TransitionBoundaryCondition on selection sel1 | d = 0.0015; noCoupling = 0
    sctr1: Scattering "Scattering Boundary Condition 1" on selection sel2
    lport1: LumpedPort on boundaries 17, 35
      PortType = Uniform
      Zref = 50
      TerminalType = Cable
      hPort = C_h
      wPort = (P_d +P_h)*2
      ahPort = {0, 1, 0}
      SourceType = Power
      P0 = 10[W]
    lelement1: LumpedElement on boundaries 11 | Zelement = 1e-12; LumpedElementType = Capacitor; Celement = C_hor
    lelement2: LumpedElement on boundaries 21 | Zelement = 1e-12; LumpedElementType = Capacitor; Celement = C_ver
    lelement3: LumpedElement on boundaries 22 | Zelement = 1e-12; LumpedElementType = Capacitor; Celement = C_ver
    lelement4: LumpedElement on boundaries 33 | Zelement = C_hor; LumpedElementType = Capacitor; Celement = C_hor
    lelement5: LumpedElement on boundaries 19 | Zelement = 1e12; LumpedElementType = Capacitor; Celement = C_ver
    lelement6: LumpedElement on boundaries 32 | Zelement = 1e12; LumpedElementType = Capacitor; Celement = C_hor
    lelement7: LumpedElement on boundaries 17 | Zelement = 0; LumpedElementType = Capacitor; Celement = C_ver
    lelement8: LumpedElement on boundaries 10 | Zelement = 1e12; LumpedElementType = Capacitor; Celement = C_hor
    pec2: PerfectElectricConductor on boundaries 34

Mesh
  mesh1 "Mesh 1"
    size: MeshSizeDefault | hmax = 0.2; hmin = 0.036; hcurve = 0.6; hnarrow = 0.5; hgrad = 1.5
    ftri1: FreeTri "Free Triangular 1" on selection sel3
      size1: Size on selection sel3 | hmax = C_h/3; custom = on
    ftri4: FreeTri "Free Triangular 4" on boundaries 35
      size1: Size on boundaries 35 | hmax = 0.002; custom = on
    ftri5: FreeTri "Free Triangular 5" on boundaries 34
      size1: Size on boundaries 34 | hmax = 0.002; custom = on
    ftri3: FreeTri "Free Triangular 3" on selection sel4
      size1: Size on entire geometry | hmax = Q_d/20; custom = on
    ftri2: FreeTri "Free Triangular 2" on selection sel1
      size1: Size on selection sel1 | hmax = Q_d/20; custom = on
    ftet1: FreeTet "Free Tetrahedral 1" on remaining entities
      size1: Size on entire geometry

Studies
  std2 "Study 2"
    param: Parametric "Parametric Sweep" | pname = mouse_x; plistarr = range(-0.2,0.05,0.2)
    freq: Frequency "Frequency Domain" | punit = MHz; plist = 6.67

Solver configurations
  sol1 "Solution 1" (study std2)
    v1: Variables "Dependent Variables 1"
    s1: Stationary "Stationary Solver 1" | stol = 0.01; linpmethod = sol
      p1: Parametric | pname = freq; plistarr = 6.67; punit = MHz; pcontinuationmode = no
      fc1: FullyCoupled | linsolver = i1
      i1: Iterative "Suggested Iterative Solver (emw)" | itrestart = 300; prefuntype = right
        mg1: Multigrid | iter = 1
  sol2 "Parametric Solutions 1" (study std2)

Datasets
  dset7: Solution | solution = sol2

Derived values
  av1: AvVolume "Volume Average 1" on domains 3
    data = dset7
    table = tbl1
    expr = emw.Qh/(1000[kg/m^3])*(5[W]/emw.Pport_1)
    unit = W/kg
    descr = Total power dissipation density

Tables
  tbl1: Table
    // Volume Average 1
    mouse_x | freq (MHz) | Total power dissipation density (W/kg)
    -0.2 | 6.67 | 0.0910002
    -0.15 | 6.67 | 0.19074
    -0.1 | 6.67 | 0.147218
    -0.05 | 6.67 | 0.0733547
    0 | 6.67 | 0.0627835
    0.05 | 6.67 | 0.0737521
    0.1 | 6.67 | 0.145964
    0.15 | 6.67 | 0.189562
    0.2 | 6.67 | 0.0896943